** Clean snap-back benchmark: elastic bar + ONE cohesive interface.
** Generated by mkcohesive.py - do not edit by hand.
**
**   E=200000 nu=0  Kn=1e+06 Tn0=400 Ts0=400 Gc=2 gmin=1e-06 mu=0
**   d0=Tn0/Kn=0.0004   df=2Gc/Tn0=0.01   L=20
**   snap-back indicator r = (Tn0/(df-d0)) / (E/L) = 4.1667  (>1)
**   exact peak     u = 0.040400  (lambda = 0.808000) at sigma = 400
**   exact failure  u = 0.010000  (lambda = 0.200000) at sigma = 0
**   u must DECREASE by 0.030400 while the interface fails
**
** The ONLY nonlinearity and the ONLY dissipation in this model is
** the cohesive interface: the bulk is linear elastic, so any dG a
** path-following scheme measures is crack energy and nothing else.
*NODE, NSET=NALL
1, 0, 0, 0
2, 0, 0, 1
3, 0, 1, 0
4, 0, 1, 1
5, 1, 0, 0
6, 1, 0, 1
7, 1, 1, 0
8, 1, 1, 1
9, 2, 0, 0
10, 2, 0, 1
11, 2, 1, 0
12, 2, 1, 1
13, 3, 0, 0
14, 3, 0, 1
15, 3, 1, 0
16, 3, 1, 1
17, 4, 0, 0
18, 4, 0, 1
19, 4, 1, 0
20, 4, 1, 1
21, 5, 0, 0
22, 5, 0, 1
23, 5, 1, 0
24, 5, 1, 1
25, 6, 0, 0
26, 6, 0, 1
27, 6, 1, 0
28, 6, 1, 1
29, 7, 0, 0
30, 7, 0, 1
31, 7, 1, 0
32, 7, 1, 1
33, 8, 0, 0
34, 8, 0, 1
35, 8, 1, 0
36, 8, 1, 1
37, 9, 0, 0
38, 9, 0, 1
39, 9, 1, 0
40, 9, 1, 1
41, 10, 0, 0
42, 10, 0, 1
43, 10, 1, 0
44, 10, 1, 1
45, 11, 0, 0
46, 11, 0, 1
47, 11, 1, 0
48, 11, 1, 1
49, 12, 0, 0
50, 12, 0, 1
51, 12, 1, 0
52, 12, 1, 1
53, 13, 0, 0
54, 13, 0, 1
55, 13, 1, 0
56, 13, 1, 1
57, 14, 0, 0
58, 14, 0, 1
59, 14, 1, 0
60, 14, 1, 1
61, 15, 0, 0
62, 15, 0, 1
63, 15, 1, 0
64, 15, 1, 1
65, 16, 0, 0
66, 16, 0, 1
67, 16, 1, 0
68, 16, 1, 1
69, 17, 0, 0
70, 17, 0, 1
71, 17, 1, 0
72, 17, 1, 1
73, 18, 0, 0
74, 18, 0, 1
75, 18, 1, 0
76, 18, 1, 1
77, 19, 0, 0
78, 19, 0, 1
79, 19, 1, 0
80, 19, 1, 1
81, 20, 0, 0
82, 20, 0, 1
83, 20, 1, 0
84, 20, 1, 1
85, 10, 0, 0
86, 10, 0, 1
87, 10, 1, 0
88, 10, 1, 1
*ELEMENT, TYPE=C3D4, ELSET=EBULK
1, 1, 5, 7, 8
2, 1, 7, 3, 8
3, 1, 3, 4, 8
4, 1, 4, 2, 8
5, 1, 2, 6, 8
6, 1, 6, 5, 8
7, 5, 9, 11, 12
8, 5, 11, 7, 12
9, 5, 7, 8, 12
10, 5, 8, 6, 12
11, 5, 6, 10, 12
12, 5, 10, 9, 12
13, 9, 13, 15, 16
14, 9, 15, 11, 16
15, 9, 11, 12, 16
16, 9, 12, 10, 16
17, 9, 10, 14, 16
18, 9, 14, 13, 16
19, 13, 17, 19, 20
20, 13, 19, 15, 20
21, 13, 15, 16, 20
22, 13, 16, 14, 20
23, 13, 14, 18, 20
24, 13, 18, 17, 20
25, 17, 21, 23, 24
26, 17, 23, 19, 24
27, 17, 19, 20, 24
28, 17, 20, 18, 24
29, 17, 18, 22, 24
30, 17, 22, 21, 24
31, 21, 25, 27, 28
32, 21, 27, 23, 28
33, 21, 23, 24, 28
34, 21, 24, 22, 28
35, 21, 22, 26, 28
36, 21, 26, 25, 28
37, 25, 29, 31, 32
38, 25, 31, 27, 32
39, 25, 27, 28, 32
40, 25, 28, 26, 32
41, 25, 26, 30, 32
42, 25, 30, 29, 32
43, 29, 33, 35, 36
44, 29, 35, 31, 36
45, 29, 31, 32, 36
46, 29, 32, 30, 36
47, 29, 30, 34, 36
48, 29, 34, 33, 36
49, 33, 37, 39, 40
50, 33, 39, 35, 40
51, 33, 35, 36, 40
52, 33, 36, 34, 40
53, 33, 34, 38, 40
54, 33, 38, 37, 40
55, 37, 41, 43, 44
56, 37, 43, 39, 44
57, 37, 39, 40, 44
58, 37, 40, 38, 44
59, 37, 38, 42, 44
60, 37, 42, 41, 44
61, 85, 45, 47, 48
62, 85, 47, 87, 48
63, 85, 87, 88, 48
64, 85, 88, 86, 48
65, 85, 86, 46, 48
66, 85, 46, 45, 48
67, 45, 49, 51, 52
68, 45, 51, 47, 52
69, 45, 47, 48, 52
70, 45, 48, 46, 52
71, 45, 46, 50, 52
72, 45, 50, 49, 52
73, 49, 53, 55, 56
74, 49, 55, 51, 56
75, 49, 51, 52, 56
76, 49, 52, 50, 56
77, 49, 50, 54, 56
78, 49, 54, 53, 56
79, 53, 57, 59, 60
80, 53, 59, 55, 60
81, 53, 55, 56, 60
82, 53, 56, 54, 60
83, 53, 54, 58, 60
84, 53, 58, 57, 60
85, 57, 61, 63, 64
86, 57, 63, 59, 64
87, 57, 59, 60, 64
88, 57, 60, 58, 64
89, 57, 58, 62, 64
90, 57, 62, 61, 64
91, 61, 65, 67, 68
92, 61, 67, 63, 68
93, 61, 63, 64, 68
94, 61, 64, 62, 68
95, 61, 62, 66, 68
96, 61, 66, 65, 68
97, 65, 69, 71, 72
98, 65, 71, 67, 72
99, 65, 67, 68, 72
100, 65, 68, 66, 72
101, 65, 66, 70, 72
102, 65, 70, 69, 72
103, 69, 73, 75, 76
104, 69, 75, 71, 76
105, 69, 71, 72, 76
106, 69, 72, 70, 76
107, 69, 70, 74, 76
108, 69, 74, 73, 76
109, 73, 77, 79, 80
110, 73, 79, 75, 80
111, 73, 75, 76, 80
112, 73, 76, 74, 80
113, 73, 74, 78, 80
114, 73, 78, 77, 80
115, 77, 81, 83, 84
116, 77, 83, 79, 84
117, 77, 79, 80, 84
118, 77, 80, 78, 84
119, 77, 78, 82, 84
120, 77, 82, 81, 84
** UC6 is a user element and must be declared before it is used;
** e_c3d_u.f dispatches on lakon(2:3)=='C6' to e_c3d_uc6.
*USER ELEMENT, TYPE=UC6, NODES=6, INTEGRATION POINTS=3, MAXDOF=3
*ELEMENT, TYPE=UC6, ELSET=ECOH
121, 41, 43, 44, 85, 87, 88
122, 41, 44, 42, 85, 88, 86
*NSET, NSET=NLEFT
1, 2, 3, 4
*NSET, NSET=NRIGHT
81, 82, 83, 84
*MATERIAL, NAME=ELAST
*ELASTIC
200000, 0
*MATERIAL, NAME=COH
*ELASTIC
200000, 0
*DEPVAR
4
*SOLID SECTION, ELSET=EBULK, MATERIAL=ELAST
*USER SECTION, ELSET=ECOH, MATERIAL=COH, CONSTANTS=6
1e+06, 400, 400, 2, 1e-06, 0
** y and z are held everywhere: with nu=0 and pure axial loading the
** exact solution has no lateral displacement, so this adds no
** stress and makes the model an exact 1-D chain.
*BOUNDARY
NALL, 2, 3, 0.
NLEFT, 1, 1, 0.
*STEP, INC=5000, NLGEOM
*STATIC
0.01, 1.0, 1e-09, 0.02
*BOUNDARY
NRIGHT, 1, 1, 0.05
*NODE PRINT, NSET=NRIGHT, TOTALS=ONLY
RF
*NODE PRINT, NSET=NRIGHT
U
*EL PRINT, ELSET=ECOH
SDV
*NODE FILE
U, RF
*END STEP
