** Mixed-mode snap-back benchmark: elastic bar + ONE INCLINED
** cohesive interface.  Generated by mkmixed.py - do not edit.
**
**   E=200000 nu=0  Kn=1e+06 Tn0=400 Ts0=300 Gc=2 gmin=1e-06 mu=0
**   d0=Tn0/Kn=0.0004   df=2Gc/Tn0=0.01   L=20
**   interface tilt tan=1 (45.000 deg), n_x=0.70710678
**   beta=(Ts0/Tn0)^2=0.56250000  kappa^2=0.78125000
**   MIXED MODE: shear carries 0.3600 of deff^2 at every UC6 point
**   snap-back indicator r = L*kappa^2*Tn0/(E*c*(df-d0)) = 4.6036 (>1)
**   exact peak     deff=0.0004  u=0.05045255 (lambda=0.84087581) sigma=500.000000
**   exact failure  deff=0.01  u=0.01131371 (lambda=0.18856181) sigma=0
**   u must DECREASE by 0.03913884 while the interface fails
**
** The bulk is linear elastic and every node is held in y and z, so
** the exact solution is uniform strain in each block with a
** constant jump across the inclined facet.  Linear tetrahedra
** represent that exactly, whatever the layer grading.
*NODE, NSET=NALL
1, 0, 0, 0
2, 0, 0, 1
3, 0, 1, 0
4, 0, 1, 1
5, 0.95, 0, 0
6, 0.95, 0, 1
7, 1.05, 1, 0
8, 1.05, 1, 1
9, 1.9, 0, 0
10, 1.9, 0, 1
11, 2.1, 1, 0
12, 2.1, 1, 1
13, 2.85, 0, 0
14, 2.85, 0, 1
15, 3.15, 1, 0
16, 3.15, 1, 1
17, 3.8, 0, 0
18, 3.8, 0, 1
19, 4.2, 1, 0
20, 4.2, 1, 1
21, 4.75, 0, 0
22, 4.75, 0, 1
23, 5.25, 1, 0
24, 5.25, 1, 1
25, 5.7, 0, 0
26, 5.7, 0, 1
27, 6.3, 1, 0
28, 6.3, 1, 1
29, 6.65, 0, 0
30, 6.65, 0, 1
31, 7.35, 1, 0
32, 7.35, 1, 1
33, 7.6, 0, 0
34, 7.6, 0, 1
35, 8.4, 1, 0
36, 8.4, 1, 1
37, 8.55, 0, 0
38, 8.55, 0, 1
39, 9.45, 1, 0
40, 9.45, 1, 1
41, 9.5, 0, 0
42, 9.5, 0, 1
43, 10.5, 1, 0
44, 10.5, 1, 1
45, 10.55, 0, 0
46, 10.55, 0, 1
47, 11.45, 1, 0
48, 11.45, 1, 1
49, 11.6, 0, 0
50, 11.6, 0, 1
51, 12.4, 1, 0
52, 12.4, 1, 1
53, 12.65, 0, 0
54, 12.65, 0, 1
55, 13.35, 1, 0
56, 13.35, 1, 1
57, 13.7, 0, 0
58, 13.7, 0, 1
59, 14.3, 1, 0
60, 14.3, 1, 1
61, 14.75, 0, 0
62, 14.75, 0, 1
63, 15.25, 1, 0
64, 15.25, 1, 1
65, 15.8, 0, 0
66, 15.8, 0, 1
67, 16.2, 1, 0
68, 16.2, 1, 1
69, 16.85, 0, 0
70, 16.85, 0, 1
71, 17.15, 1, 0
72, 17.15, 1, 1
73, 17.9, 0, 0
74, 17.9, 0, 1
75, 18.1, 1, 0
76, 18.1, 1, 1
77, 18.95, 0, 0
78, 18.95, 0, 1
79, 19.05, 1, 0
80, 19.05, 1, 1
81, 20, 0, 0
82, 20, 0, 1
83, 20, 1, 0
84, 20, 1, 1
85, 9.5, 0, 0
86, 9.5, 0, 1
87, 10.5, 1, 0
88, 10.5, 1, 1
*ELEMENT, TYPE=C3D4, ELSET=EBULK
1, 1, 5, 7, 8
2, 1, 7, 3, 8
3, 1, 3, 4, 8
4, 1, 4, 2, 8
5, 1, 2, 6, 8
6, 1, 6, 5, 8
7, 5, 9, 11, 12
8, 5, 11, 7, 12
9, 5, 7, 8, 12
10, 5, 8, 6, 12
11, 5, 6, 10, 12
12, 5, 10, 9, 12
13, 9, 13, 15, 16
14, 9, 15, 11, 16
15, 9, 11, 12, 16
16, 9, 12, 10, 16
17, 9, 10, 14, 16
18, 9, 14, 13, 16
19, 13, 17, 19, 20
20, 13, 19, 15, 20
21, 13, 15, 16, 20
22, 13, 16, 14, 20
23, 13, 14, 18, 20
24, 13, 18, 17, 20
25, 17, 21, 23, 24
26, 17, 23, 19, 24
27, 17, 19, 20, 24
28, 17, 20, 18, 24
29, 17, 18, 22, 24
30, 17, 22, 21, 24
31, 21, 25, 27, 28
32, 21, 27, 23, 28
33, 21, 23, 24, 28
34, 21, 24, 22, 28
35, 21, 22, 26, 28
36, 21, 26, 25, 28
37, 25, 29, 31, 32
38, 25, 31, 27, 32
39, 25, 27, 28, 32
40, 25, 28, 26, 32
41, 25, 26, 30, 32
42, 25, 30, 29, 32
43, 29, 33, 35, 36
44, 29, 35, 31, 36
45, 29, 31, 32, 36
46, 29, 32, 30, 36
47, 29, 30, 34, 36
48, 29, 34, 33, 36
49, 33, 37, 39, 40
50, 33, 39, 35, 40
51, 33, 35, 36, 40
52, 33, 36, 34, 40
53, 33, 34, 38, 40
54, 33, 38, 37, 40
55, 37, 41, 43, 44
56, 37, 43, 39, 44
57, 37, 39, 40, 44
58, 37, 40, 38, 44
59, 37, 38, 42, 44
60, 37, 42, 41, 44
61, 85, 45, 47, 48
62, 85, 47, 87, 48
63, 85, 87, 88, 48
64, 85, 88, 86, 48
65, 85, 86, 46, 48
66, 85, 46, 45, 48
67, 45, 49, 51, 52
68, 45, 51, 47, 52
69, 45, 47, 48, 52
70, 45, 48, 46, 52
71, 45, 46, 50, 52
72, 45, 50, 49, 52
73, 49, 53, 55, 56
74, 49, 55, 51, 56
75, 49, 51, 52, 56
76, 49, 52, 50, 56
77, 49, 50, 54, 56
78, 49, 54, 53, 56
79, 53, 57, 59, 60
80, 53, 59, 55, 60
81, 53, 55, 56, 60
82, 53, 56, 54, 60
83, 53, 54, 58, 60
84, 53, 58, 57, 60
85, 57, 61, 63, 64
86, 57, 63, 59, 64
87, 57, 59, 60, 64
88, 57, 60, 58, 64
89, 57, 58, 62, 64
90, 57, 62, 61, 64
91, 61, 65, 67, 68
92, 61, 67, 63, 68
93, 61, 63, 64, 68
94, 61, 64, 62, 68
95, 61, 62, 66, 68
96, 61, 66, 65, 68
97, 65, 69, 71, 72
98, 65, 71, 67, 72
99, 65, 67, 68, 72
100, 65, 68, 66, 72
101, 65, 66, 70, 72
102, 65, 70, 69, 72
103, 69, 73, 75, 76
104, 69, 75, 71, 76
105, 69, 71, 72, 76
106, 69, 72, 70, 76
107, 69, 70, 74, 76
108, 69, 74, 73, 76
109, 73, 77, 79, 80
110, 73, 79, 75, 80
111, 73, 75, 76, 80
112, 73, 76, 74, 80
113, 73, 74, 78, 80
114, 73, 78, 77, 80
115, 77, 81, 83, 84
116, 77, 83, 79, 84
117, 77, 79, 80, 84
118, 77, 80, 78, 84
119, 77, 78, 82, 84
120, 77, 82, 81, 84
*USER ELEMENT, TYPE=UC6, NODES=6, INTEGRATION POINTS=3, MAXDOF=3
*ELEMENT, TYPE=UC6, ELSET=ECOH
121, 41, 43, 44, 85, 87, 88
122, 41, 44, 42, 85, 88, 86
*NSET, NSET=NLEFT
1, 2, 3, 4
*NSET, NSET=NRIGHT
81, 82, 83, 84
*MATERIAL, NAME=ELAST
*ELASTIC
200000, 0
*MATERIAL, NAME=COH
*ELASTIC
200000, 0
*DEPVAR
4
*SOLID SECTION, ELSET=EBULK, MATERIAL=ELAST
*USER SECTION, ELSET=ECOH, MATERIAL=COH, CONSTANTS=6
1e+06, 400, 300, 2, 1e-06, 0
*BOUNDARY
NALL, 2, 3, 0.
NLEFT, 1, 1, 0.
*STEP, INC=5000, NLGEOM
*STATIC
0.01, 1.0, 1e-09, 0.02
*BOUNDARY
NRIGHT, 1, 1, 0.06
*NODE PRINT, NSET=NRIGHT, TOTALS=ONLY
RF
*NODE PRINT, NSET=NRIGHT
U
** E holds the three LOCAL separations (dn,ds1,ds2), dvisc, deff,
** dmax for a UC6 point - see resultsmech_uc6.f.
*EL PRINT, ELSET=ECOH
SDV, E
*NODE FILE
U, RF
*END STEP
