** C3D4 two-phase disk with duplicated ZrH interface nodes and UC6 facets
** Source: m12_s3rad_merged.inp
** Interface facets: 5400; duplicated nodes: 2724
*Node
1, 1.704700000000E+00, 2.456800000000E+00, 4.909000000000E-01
2, 1.614700000000E+00, 2.456800000000E+00, 4.909000000000E-01
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*User Element, Type=UC6, Nodes=6, Integration Points=3, MaxDof=3
*Element, Type=C3D4
8395, 7260, 7381, 7380, 4257
8396, 7400, 7414, 7413, 7404
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*Element, Type=UC6
45802, 37, 322, 321, 7260, 7381, 7380
45803, 341, 345, 355, 7400, 7404, 7414
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*Elset, Elset=MATRIX
17863, 17864, 17865, 17866, 17867, 17868
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*Elset, Elset=PLATETANGENTIAL
8395, 8396, 8397, 8398, 8399, 8400
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*Elset, Elset=INTERFACE_SEED
49486
*Elset, Elset=INTERFACE_REGULAR
45802, 45803, 45804, 45805, 45806, 45807
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*Elset, Elset=INTERFACE
45802, 45803, 45804, 45805, 45806, 45807
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*Nset, Nset=FACE_X0_NSET
25, 26, 27, 28, 153, 154
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*Nset, Nset=FACE_XL_NSET
29, 30, 31, 32, 217, 218
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*Nset, Nset=FIXPOINTA
26
*Nset, Nset=FIXPOINTB
28
*Material, Name=ZR
*Elastic
108800., 0.335
*Plastic
500., 0.
550., 0.020
600., 0.050
650., 0.100
690., 0.250
720., 0.500
*Damage Initiation, Criterion=Ductile, Evolution=Displacement, Npoints=6
1.0, 0.0150, 0.00, 0.3000, 0.33, 0.1200, 0.50, 0.0700
0.67, 0.0425, 1.00, 0.0250, 1.50, 0.0150
*Material, Name=ZRH
*Elastic
130000., 0.33
*Plastic
600., 0.
620., 0.0005
640., 0.0010
660., 0.0020
680., 0.0030
700., 0.0050
720., 0.0100
*Damage Initiation, Criterion=Ductile, Evolution=Displacement, Npoints=6
1.0, 0.004, 0.00, 0.120, 0.33, 0.070, 0.50, 0.045
0.67, 0.028, 1.00, 0.015, 1.50, 0.010
*Material, Name=COHESIVE
*Elastic
1., 0.
*Depvar
4
*Solid Section, Elset=MATRIX, Material=ZR
*Solid Section, Elset=PLATETANGENTIAL, Material=ZRH
** Kn, Tn0, Ts0, Gc, residual fraction, viscosity
*User Section, Elset=INTERFACE_SEED, Material=COHESIVE, Constants=6
200000.0, 275.0, 240.0, 2.000, 1.e-5, 1.e-4
*User Section, Elset=INTERFACE_REGULAR, Material=COHESIVE, Constants=6
200000.0, 300.0, 260.0, 2.400, 1.e-5, 1.e-4
*Step, Nlgeom, Inc=200000
*Static, Solver=Pardiso
1.000000e-03, 1., 1.000000e-09, 2.000000e-03
*Boundary
FACE_X0_NSET, 1, 1, 0.
FACE_XL_NSET, 1, 1, 1.000
FIXPOINTA, 2, 3, 0.
FIXPOINTB, 3, 3, 0.
*Output, Frequency=5
*Node File
U, RF
*El File
S, E, PEEQ, SDV
*Node Print, Nset=FACE_XL_NSET, Totals=Yes
RF, U
*El Print, Elset=INTERFACE
S, E, SDV
*End Step
